// SBML level 3 version 1

function Function_for_R_3(compartmentOne, k3, rhoTr, xFinal_9)
  k3*rhoTr*xFinal_9/compartmentOne;
end

function Function_for_R_1(compartmentOne, k4, rhoTr, xFinal_10)
  k4*rhoTr*xFinal_10/compartmentOne;
end

function Function_for_R_2(alpha, apopFBL, compartmentOne, rhoDe, xFinal_12)
  (alpha*rhoDe*xFinal_12 + apopFBL*xFinal_12)/compartmentOne;
end

function Function_for_R_4(AId, apopFBL, compartmentOne, k4, rhoTr, xFinal_10)
  (AId*k4*xFinal_10*(rhoTr/(1 - AId)) + apopFBL*xFinal_10)/compartmentOne;
end

function Function_for_R_5(compartmentOne, k2s, rhoTA, xFinal_8)
  k2s*rhoTA*xFinal_8/compartmentOne;
end

function Function_for_R_6(compartmentOne, k2a, rhoTA, xFinal_8)
  k2a*rhoTA*xFinal_8/compartmentOne;
end

function Function_for_R_7(AId, apopFBL, compartmentOne, k3, rhoTr, xFinal_9)
  (AId*k3*xFinal_9*(rhoTr/(1 - AId)) + apopFBL*xFinal_9)/compartmentOne;
end

function Function_for_R_8(compartmentOne, km2, xFinal_9)
  km2*xFinal_9/compartmentOne;
end

function Function_for_R_9(compartmentOne, k1sh, rhoSC, xFinal_7)
  k1sh*rhoSC*xFinal_7/compartmentOne;
end

function Function_for_R_10(compartmentOne, k1ah, rhoSC, xFinal_7)
  k1ah*rhoSC*xFinal_7/compartmentOne;
end

function Function_for_R_11(aProl, bProl, compartmentOne, doseBL, gamma2, rhoTA, xFinal_8)
  aProl*aProl*gamma2*rhoTA*exp(bProl*doseBL)*exp(bProl*doseBL)*xFinal_8/compartmentOne;
end

function Function_for_R_12(AId, apopFBL, compartmentOne, k2s, rhoTA, xFinal_8)
  (AId*k2s*xFinal_8*(rhoTA/(1 - AId)) + apopFBL*xFinal_8)/compartmentOne;
end

function Function_for_R_13(compartmentOne, km1, xFinal_8)
  km1*xFinal_8/compartmentOne;
end

function Function_for_R_14(aProl, bProl, compartmentOne, doseBL, gamma1h, rhoSC, xFinal_7)
  aProl*gamma1h*rhoSC*exp(bProl*doseBL)*xFinal_7/compartmentOne;
end

function Function_for_R_15(Pscmax, aProl, bProl, compartmentOne, doseBL, gamma1h, lambda, rhoSC, xFinal_6, xFinal_7)
  aProl*gamma1h*rhoSC*exp(bProl*doseBL)*xFinal_7*(xFinal_6/(lambda*Pscmax))/compartmentOne;
end

function Function_for_R_16(AId, Ka, Kp, Pscmax, aProl, apopFBL, bProl, compartmentOne, doseBL, gamma1h, k1sh, lambda, rhoSC, xFinal_7)
  (aProl*gamma1h*rhoSC*exp(bProl*doseBL)*xFinal_7*(xFinal_7/(lambda*Pscmax)) + AId*k1sh*xFinal_7*(rhoSC/(1 - AId)) + apopFBL*xFinal_7 + Kp*(1/(Ka^2 + xFinal_7^2))*xFinal_7^2)/compartmentOne;
end

function Function_for_R_17(compartmentOne, k5, xFinal_5)
  k5*xFinal_5/compartmentOne;
end

function Function_for_R_18(alpha, apopFBL, compartmentOne, xFinal_6)
  (alpha*xFinal_6 + apopFBL*xFinal_6)/compartmentOne;
end

function Function_for_R_19(compartmentOne, k4, xFinal_4)
  k4*xFinal_4/compartmentOne;
end

function Function_for_R_20(AIh, apopFBL, compartmentOne, k5, xFinal_5)
  (k5*xFinal_5*(AIh/(1 - AIh)) + apopFBL*xFinal_5)/compartmentOne;
end

function Function_for_R_21(compartmentOne, k3, xFinal_3)
  k3*xFinal_3/compartmentOne;
end

function Function_for_R_22(AIh, apopFBL, compartmentOne, k4, xFinal_4)
  (k4*xFinal_4*(AIh/(1 - AIh)) + apopFBL*xFinal_4)/compartmentOne;
end

function Function_for_R_23(compartmentOne, k2s, xFinal_2)
  k2s*xFinal_2/compartmentOne;
end

function Function_for_R_24(compartmentOne, k2a, xFinal_2)
  k2a*xFinal_2/compartmentOne;
end

function Function_for_R_25(AIh, apopFBL, compartmentOne, k3, xFinal_3)
  (k3*xFinal_3*(AIh/(1 - AIh)) + apopFBL*xFinal_3)/compartmentOne;
end

function Function_for_R_26(compartmentOne, km2, xFinal_3)
  km2*xFinal_3/compartmentOne;
end

function Function_for_R_27(Ptah, compartmentOne, k1sh, n, omega, xFinal_1, xFinal_2, xFinal_8)
  omega*xFinal_1*(k1sh/(1 + (omega - 1)*((xFinal_2 + xFinal_8)/Ptah)^n))/compartmentOne;
end

function Function_for_R_28(Ptah, compartmentOne, k1ah, n, omega, xFinal_1, xFinal_2, xFinal_8)
  omega*xFinal_1*(k1ah/(1 + (omega - 1)*((xFinal_2 + xFinal_8)/Ptah)^n))/compartmentOne;
end

function Function_for_R_29(aProl, bProl, compartmentOne, doseBL, gamma2, xFinal_2)
  aProl*gamma2*exp(bProl*doseBL)*xFinal_2/compartmentOne;
end

function Function_for_R_30(AIh, apopFBL, compartmentOne, k2s, xFinal_2)
  (k2s*xFinal_2*(AIh/(1 - AIh)) + apopFBL*xFinal_2)/compartmentOne;
end

function Function_for_R_31(compartmentOne, km1, xFinal_2)
  km1*xFinal_2/compartmentOne;
end

function Function_for_R_32(Ptah, aProl, bProl, compartmentOne, doseBL, gamma1h, n, omega, xFinal_1, xFinal_2, xFinal_8)
  aProl*gamma1h*exp(bProl*doseBL)*xFinal_1*(omega/(1 + (omega - 1)*((xFinal_2 + xFinal_8)/Ptah)^n))/compartmentOne;
end

function Function_for_R_33(Pscmax, Ptah, aProl, bProl, compartmentOne, doseBL, gamma1h, k1sh, n, omega, xFinal_1, xFinal_2, xFinal_8)
  (gamma1h*(aProl*exp(bProl*doseBL)*xFinal_1*omega*xFinal_1/(1 + (omega - 1)*((xFinal_2 + xFinal_8)/Ptah)^n)/Pscmax) + k1sh*xFinal_1*(omega/(1 + (omega - 1)*((xFinal_2 + xFinal_8)/Ptah)^n)))/compartmentOne;
end

function Function_for_R_34(Pscmax, Ptah, aProl, bProl, compartmentOne, doseBL, gamma1h, lambda, n, omega, xFinal_1, xFinal_2, xFinal_7, xFinal_8)
  gamma1h*(aProl*exp(bProl*doseBL)*xFinal_1*omega*xFinal_7/(1 + (omega - 1)*((xFinal_2 + xFinal_8)/Ptah)^n)/lambda/Pscmax)/compartmentOne;
end

function Function_for_R_35(AIh, apopFBL, compartmentOne, k1sh, xFinal_1)
  (k1sh*xFinal_1*(AIh/(1 - AIh)) + apopFBL*xFinal_1)/compartmentOne;
end

model BLISS_simplified()
  // FelixGarza2017_BlueLightTreatmentofPsoriasis_simplified
  // model units - substance: substance, time: time, volume: volume, area: area, length: length, extent: substance

  // Compartments:
  compartment compartmentOne = 1 litre;

  // Species:
  species xFinal_1 in compartmentOne = 362;  // substance in mole
  species xFinal_2 in compartmentOne = 77;  // substance in mole
  species xFinal_3 in compartmentOne = 61;  // substance in mole
  species xFinal_4 in compartmentOne = 238;  // substance in mole
  species xFinal_5 in compartmentOne = 119;  // substance in mole
  species xFinal_6 in compartmentOne = 185;  // substance in mole
  species xFinal_7 in compartmentOne = 6459;  // substance in mole
  species xFinal_8 in compartmentOne = 32098;  // substance in mole
  species xFinal_9 in compartmentOne = 20536;  // substance in mole
  species xFinal_10 in compartmentOne = 79788;  // substance in mole
  species xFinal_11 in compartmentOne = 0;  // substance in mole
  species xFinal_12 in compartmentOne = 77633;  // substance in mole

  // Parameters:
  AId = 0.00035;
  AIh = 0.0012;
  alpha = 0.0714;
  alphaps = rhoDe*alpha;
  apopFBL = 0;
  aProl = 1;
  beta1 = AIh*k1sh/(1 - AIh);
  beta1h = AIh*k1sh/(1 - AIh);
  beta2 = AIh*k2s/(1 - AIh);
  beta3 = AIh*k3/(1 - AIh);
  beta4 = AIh*k4/(1 - AIh);
  beta5 = AIh*k5/(1 - AIh);
  betaps1 = AId*k1sh*rhoSC/(1 - AId);
  betaps2 = AId*kps2s/(1 - AId);
  betaps3 = AId*kps3/(1 - AId);
  betaps4 = AId*kps4/(1 - AId);
  bProl = -0.003404;
  doseBL = 90*skinType;
  gamma1h = 0.0033;
  gamma1ps = rhoSC*gamma1h;
  gamma2 = 0.014;
  gamma2ps = rhoTA*gamma2*thetaBLprol;
  k1ah = 0.0131;
  k1sh = 0.00164;
  k2a = 0.138;
  k2s = 0.0173;
  k3 = 0.216;
  k4 = 0.0556;
  k5 = 0.111;
  km1 = 1e-6;
  km2 = 1e-6;
  kmps1 = km1;
  kmps2 = km2;
  Kp = 6;
  kps1a = rhoSC*k1ah;
  kps1s = rhoSC*k1sh;
  kps2a = rhoTA*k2a;
  kps2s = rhoTA*k2s;
  kps3 = rhoTr*k3;
  kps4 = rhoTr*k4;
  lambda = 3.5;
  LPSI0 = 5.34;
  n = 3;
  omega = 100;
  Psch = Pscmax*(1 - 1/gamma1h*(k1sh + beta1h - km1*(k1ah + k1sh*2)/(km1 + k2s + beta2 - gamma2 - km2*(k2a + 2*k2s)/(km2 + k3 + beta3))));
  Pscmax = 4500;
  Ptah = (k1ah + 2*k1sh)/(km1 + k2s + beta2 - gamma2 - km2*(k2a + 2*k2s)/(km2 + k3 + beta3))*Psch;
  rhoDe = 4;
  rhoSC = 4;
  rhoTA = 4;
  rhoTr = 5;
  skinType = 0.579;
  therI = 84;
  thetaBLprol = aProl*exp(bProl*doseBL);

  // Assignment rules:
  Ka := 3^(1/2)*Psch/10;

  // Reactions:
  R_1: xFinal_10 => xFinal_12; compartmentOne*Function_for_R_1(compartmentOne, k4, rhoTr, xFinal_10);
  R_2: xFinal_12 => ; compartmentOne*Function_for_R_2(alpha, apopFBL, compartmentOne, rhoDe, xFinal_12);
  R_3: xFinal_9 => xFinal_10; compartmentOne*Function_for_R_3(compartmentOne, k3, rhoTr, xFinal_9);
  R_4: xFinal_10 => ; compartmentOne*Function_for_R_4(AId, apopFBL, compartmentOne, k4, rhoTr, xFinal_10);
  R_5: xFinal_8 => 2 xFinal_9; compartmentOne*Function_for_R_5(compartmentOne, k2s, rhoTA, xFinal_8);
  R_6: xFinal_8 => xFinal_8 + xFinal_9; compartmentOne*Function_for_R_6(compartmentOne, k2a, rhoTA, xFinal_8);
  R_7: xFinal_9 => ; compartmentOne*Function_for_R_7(AId, apopFBL, compartmentOne, k3, rhoTr, xFinal_9);
  R_8: xFinal_9 => xFinal_8; compartmentOne*Function_for_R_8(compartmentOne, km2, xFinal_9);
  R_9: xFinal_7 => 2 xFinal_8; compartmentOne*Function_for_R_9(compartmentOne, k1sh, rhoSC, xFinal_7);
  R_10: xFinal_7 => xFinal_7 + xFinal_8; compartmentOne*Function_for_R_10(compartmentOne, k1ah, rhoSC, xFinal_7);
  R_11: xFinal_8 => 2 xFinal_8; compartmentOne*Function_for_R_11(aProl, bProl, compartmentOne, doseBL, gamma2, rhoTA, xFinal_8);
  R_12: xFinal_8 => ; compartmentOne*Function_for_R_12(AId, apopFBL, compartmentOne, k2s, rhoTA, xFinal_8);
  R_13: xFinal_8 => xFinal_7; compartmentOne*Function_for_R_13(compartmentOne, km1, xFinal_8);
  R_14: xFinal_7 => 2 xFinal_7; compartmentOne*Function_for_R_14(aProl, bProl, compartmentOne, doseBL, gamma1h, rhoSC, xFinal_7);
  R_15: xFinal_6 + xFinal_7 => xFinal_6; compartmentOne*Function_for_R_15(Pscmax, aProl, bProl, compartmentOne, doseBL, gamma1h, lambda, rhoSC, xFinal_6, xFinal_7);
  R_16: xFinal_7 => ; compartmentOne*Function_for_R_16(AId, Ka, Kp, Pscmax, aProl, apopFBL, bProl, compartmentOne, doseBL, gamma1h, k1sh, lambda, rhoSC, xFinal_7);
  R_17: xFinal_5 => xFinal_6; compartmentOne*Function_for_R_17(compartmentOne, k5, xFinal_5);
  R_18: xFinal_6 => ; compartmentOne*Function_for_R_18(alpha, apopFBL, compartmentOne, xFinal_6);
  R_19: xFinal_4 => xFinal_5; compartmentOne*Function_for_R_19(compartmentOne, k4, xFinal_4);
  R_20: xFinal_5 => ; compartmentOne*Function_for_R_20(AIh, apopFBL, compartmentOne, k5, xFinal_5);
  R_21: xFinal_3 => xFinal_4; compartmentOne*Function_for_R_21(compartmentOne, k3, xFinal_3);
  R_22: xFinal_4 => ; compartmentOne*Function_for_R_22(AIh, apopFBL, compartmentOne, k4, xFinal_4);
  R_23: xFinal_2 => 2 xFinal_3; compartmentOne*Function_for_R_23(compartmentOne, k2s, xFinal_2);
  R_24: xFinal_2 => xFinal_2 + xFinal_3; compartmentOne*Function_for_R_24(compartmentOne, k2a, xFinal_2);
  R_25: xFinal_3 => ; compartmentOne*Function_for_R_25(AIh, apopFBL, compartmentOne, k3, xFinal_3);
  R_26: xFinal_3 => xFinal_2; compartmentOne*Function_for_R_26(compartmentOne, km2, xFinal_3);
  R_27: xFinal_1 + xFinal_2 + xFinal_8 => xFinal_1 + 3 xFinal_2 + xFinal_8; compartmentOne*Function_for_R_27(Ptah, compartmentOne, k1sh, n, omega, xFinal_1, xFinal_2, xFinal_8);
  R_28: xFinal_1 + xFinal_2 + xFinal_8 => xFinal_1 + 2 xFinal_2 + xFinal_8; compartmentOne*Function_for_R_28(Ptah, compartmentOne, k1ah, n, omega, xFinal_1, xFinal_2, xFinal_8);
  R_29: xFinal_2 => 2 xFinal_2; compartmentOne*Function_for_R_29(aProl, bProl, compartmentOne, doseBL, gamma2, xFinal_2);
  R_30: xFinal_2 => ; compartmentOne*Function_for_R_30(AIh, apopFBL, compartmentOne, k2s, xFinal_2);
  R_31: xFinal_2 => xFinal_1; compartmentOne*Function_for_R_31(compartmentOne, km1, xFinal_2);
  R_32: xFinal_1 + xFinal_2 + xFinal_8 => 2 xFinal_1 + xFinal_2 + xFinal_8; compartmentOne*Function_for_R_32(Ptah, aProl, bProl, compartmentOne, doseBL, gamma1h, n, omega, xFinal_1, xFinal_2, xFinal_8);
  R_33: xFinal_1 + xFinal_2 + xFinal_8 => xFinal_2 + xFinal_8; compartmentOne*Function_for_R_33(Pscmax, Ptah, aProl, bProl, compartmentOne, doseBL, gamma1h, k1sh, n, omega, xFinal_1, xFinal_2, xFinal_8);
  R_34: xFinal_1 + xFinal_2 + xFinal_7 + xFinal_8 => xFinal_2 + xFinal_7 + xFinal_8; compartmentOne*Function_for_R_34(Pscmax, Ptah, aProl, bProl, compartmentOne, doseBL, gamma1h, lambda, n, omega, xFinal_1, xFinal_2, xFinal_7, xFinal_8);
  R_35: xFinal_1 => ; compartmentOne*Function_for_R_35(AIh, apopFBL, compartmentOne, k1sh, xFinal_1);

  // Unit definitions:
  unit length = metre;
  unit area = metre^2;
  unit volume = dimensionless;
  unit time = 86400 second;
  unit substance = dimensionless;
end
